A := [
    5.43, 1.12, 0.95, 1.32, 0.83;
    0, 3.8, 1.92, 0.3, 0.74;
    0, 1.92, 6.21, 1.06, 1.57;
    0, 0.3, 1.06, 4, 1.05;
    0, 0.74, 1.42, 1.05, 5.32
]
B := [6.54; 1.86; 2.79; 4.66; 4.2]
x := lsolve(A, B) = [0.814578; 0.276677; 0.0586241; 0.986813; 0.540575]
r := B - A*x = [0; 0; 0; 0; -8.88178e-16]
